# 阵风边界验算：
cla := 5.87
μ := 2*120/(1.225*0.48*cla*2.8)
kg := 0.88*μ/(5.3 + μ)
kg = 0.725222
Vg := 7.62
Ve := 61.1
n := 1 + kg*Vg*Ve*cla*1.225*2.8/(2*120*9.8)
n = 3.89043
# 机动边界验算：
Ve := 26.3939423279
nm := Ve^2*1.112*2.8*1.3/(2*120*9.8)
nm = 1.19888
